// SBML level 3 version 2

function f_Gut_Plasma_limited(Nomax_Plasma_Gut, Uptake, Max_Metallothionein, Max_Plasma_Gut)
  piecewise(Nomax_Plasma_Gut, Uptake < Max_Metallothionein, Max_Plasma_Gut);
end

function f_Lung_Plasma_limited(Nomax_Plasma_Lung, Uptake, Max_Metallothionein, Max_Plasma_Lung)
  piecewise(Nomax_Plasma_Lung, Uptake < Max_Metallothionein, Max_Plasma_Lung);
end

function f_BW(Age)
  3.938425 + 0.7518199*Age*12 - 0.02023793*(Age*12)^2 + 0.0002921682*(Age*12)^3 - 2.06762e-6*(Age*12)^4 + 8.469e-9*(Age*12)^5 - 2.188427e-11*(Age*12)^6 + 3.699776e-14*(Age*12)^7 - 4.099077e-17*(Age*12)^8 + 2.874804e-20*(Age*12)^9 - 1.159732e-23*(Age*12)^10 + 2.052602e-27*(Age*12)^11;
end

function f_Metallothionein_Kidney(Age)
  piecewise(0.95, Age < 30, 0.95 - 0.95/3*(Age - 30)/50);
end

function f_Kidney_Urine(Age, Increase_Cd_Urine)
  piecewise(0.00014, Age < 30, 0.00014 + Increase_Cd_Urine*(Age - 30));
end

model PBK_Cd()
  // model units - substance: MicroGM, time: DAY, volume: L, extent: MicroGM

  // Compartments:
  compartment Liver = 1 L; Liver is "liver";
  compartment Kidney = 1 L; Kidney is "kidney";
  compartment Others = 1 L; Others is "Rest of the body";
  compartment Feces = 1 L; Feces is "feces";
  compartment Urine = 1 L; Urine is "urine";
  compartment Gut = 1 L; Gut is "gut";
  compartment Lung = 1 L; Lung is "lung";
  compartment Plasma = 1 L; Plasma is "blood plasma";
  compartment RBC = 1 L; RBC is "red blood cells";
  compartment Metallothionein = 1 L; Metallothionein is "metallothionein";

  // Species:
  substanceOnly species AGut in Gut = 0; AGut is "amount of chemical in gut";
  substanceOnly species ALung in Lung = 0; ALung is "Amount in lungs";
  substanceOnly species ALiver in Liver = 0; ALiver is "amount of chemical in liver";
  substanceOnly species AKidney in Kidney = 0; AKidney is "amount of chemical in kidney";
  substanceOnly species AUrine in Urine = 0; AUrine is "Amount in urine";
  substanceOnly species AFeces in Feces = 0; AFeces is "Amount in feces";
  substanceOnly species APlasma in Plasma = 0; APlasma is "amount of chemical in plasma";
  substanceOnly species ARBC in RBC = 0; ARBC is "Amount in red blood cells";
  substanceOnly species AMetallothionein in Metallothionein = 0; AMetallothionein is "Amount in metallothionein";
  substanceOnly species AOthers in Others = 0; AOthers is "Rest of the body";

  // Parameters:
  DeltaBW = 1 UNITLESS; DeltaBW is "Variability on bodyweight";
  BW has KiloGM; BW is "body weight";
  Age has YR; Age is "age";
  Inhalation_intake = 0.05 PER_DAY; Inhalation_intake is "Transfer from lung to total intake";
  Lung_Gut = 0.005 PER_DAY; Lung_Gut is "Transfer from lung to gut";
  Fabs = 0.048 PER_DAY; Fabs is "Fraction absorbed in intestine";
  Ka = 0.05 UNITLESS; Ka is "Transfer from intestine to total uptake";
  Uptake_Metallothionein = 0.25 UNITLESS; Uptake_Metallothionein is "Transfer from total uptake to metallothionein";
  Max_Metallothionein = 1 MicroGM_PER_DAY; Max_Metallothionein is "Maximal dose in metallothionein added daily";
  Uptake has MicroGM_PER_DAY; Uptake is "Theorical total dose for metallothionein";
  Nomax_Plasma_Gut has MicroGM_PER_DAY; Nomax_Plasma_Gut is "Dose from gut to plasma with unsaturated metallothionein";
  Nomax_Plasma_Lung has MicroGM_PER_DAY; Nomax_Plasma_Lung is "Dose from lung to plasma with unsaturated metallothionein";
  Max_Plasma_Gut has MicroGM_PER_DAY; Max_Plasma_Gut is "Dose from gut to plasma with saturated metallothionein";
  Max_Plasma_Lung has MicroGM_PER_DAY; Max_Plasma_Lung is "Dose from lung to plasma with saturated metallothionein";
  Gut_Plasma_limited has MicroGM_PER_DAY; Gut_Plasma_limited is "Transfer from gut to plasma";
  Lung_Plasma_limited has MicroGM_PER_DAY; Lung_Plasma_limited is "Transfer from lung to plasma";
  Gut_Metallothionein_limited has MicroGM_PER_DAY; Gut_Metallothionein_limited is "Transfer from gut to metallothionein";
  Lung_Metallothionein_limited has MicroGM_PER_DAY; Lung_Metallothionein_limited is "Transfer from lung to metallothionein";
  Plasma_Others = 0.44 PER_DAY; Plasma_Others is "Transfer from plasma to the rest of the body";
  Others_Plasma = 0.00014 PER_DAY; Others_Plasma is "Transfer from rest of the body to plasma";
  Plasma_Feces = 0.27 PER_DAY; Plasma_Feces is "Transfer from plasma to feces";
  Plasma_Liver = 0.25 PER_DAY; Plasma_Liver is "Transfer from plasma to liver";
  Liver_Plasma = 3e-5 PER_DAY; Liver_Plasma is "Transfer from liver to plasma";
  Liver_Metallothionein = 0.00016 PER_DAY; Liver_Metallothionein is "Transfer from liver to metallothionein";
  Liver_Feces = 5e-5 PER_DAY; Liver_Feces is "Transfer from liver to feces";
  RBC_Metallothionein = 0.012 PER_DAY; RBC_Metallothionein is "Transfer from reb blood cells to metallothionein";
  Metallothionein_Kidney has PER_DAY; Metallothionein_Kidney is "Transfer from metallothionein to kidney";
  Kidney_Plasma = 1e-5 PER_DAY; Kidney_Plasma is "Transfer from kidney to plasma";
  Kidney_Urine has PER_DAY; Kidney_Urine is "Transfer from kidney to urine";
  Increase_Cd_Urine = 1.1e-6 PER_DAY; Increase_Cd_Urine is "Temporal factor increasing Cd elimination in urine";
  Plasma_RBC = 0.04 PER_DAY; Plasma_RBC is "Transfer from plasma to red blood cells";
  Gut_Feces has MicroGM_PER_DAY; Gut_Feces is "Transfer from gut to feces";

  // Assignment rules:
  BW := f_BW(Age)*DeltaBW;
  Age := time/365;
  Uptake := Uptake_Metallothionein*(AGut*Fabs*Ka + ALung*(Lung_Gut*Ka + Inhalation_intake));
  Nomax_Plasma_Gut := (1 - Uptake_Metallothionein)*AGut*Fabs*Ka;
  Nomax_Plasma_Lung := (1 - Uptake_Metallothionein)*ALung*(Lung_Gut*Ka + Inhalation_intake);
  Max_Plasma_Gut := AGut*Fabs*Ka - Max_Metallothionein*(AGut*Fabs*Ka/(AGut*Fabs*Ka + ALung*(Lung_Gut*Ka + Inhalation_intake)));
  Max_Plasma_Lung := ALung*(Lung_Gut*Ka + Inhalation_intake) - Max_Metallothionein*(ALung*(Lung_Gut*Ka + Inhalation_intake)/(AGut*Fabs*Ka + ALung*(Lung_Gut*Ka + Inhalation_intake)));
  Gut_Plasma_limited := f_Gut_Plasma_limited(Nomax_Plasma_Gut, Uptake, Max_Metallothionein, Max_Plasma_Gut);
  Lung_Plasma_limited := f_Lung_Plasma_limited(Nomax_Plasma_Lung, Uptake, Max_Metallothionein, Max_Plasma_Lung);
  Gut_Metallothionein_limited := AGut*Fabs*Ka - Gut_Plasma_limited;
  Lung_Metallothionein_limited := ALung*(Lung_Gut*Ka + Inhalation_intake) - Lung_Plasma_limited;
  Metallothionein_Kidney := f_Metallothionein_Kidney(Age);
  Kidney_Urine := f_Kidney_Urine(Age, Increase_Cd_Urine);
  Gut_Feces := AGut*Fabs*Ka - Gut_Plasma_limited - Gut_Metallothionein_limited;

  // Reactions:
  _J0: AGut -> APlasma; Gut_Plasma_limited;
  _J1: AGut -> AMetallothionein; Gut_Metallothionein_limited;
  _J2: AGut -> AFeces; Gut_Feces;
  _J3: ALung -> APlasma; Lung_Plasma_limited;
  _J4: ALung -> AMetallothionein; Lung_Metallothionein_limited;
  _J5: APlasma -> AOthers; APlasma*Plasma_Others;
  _J6: APlasma -> ARBC; APlasma*Plasma_RBC;
  _J7: AOthers -> APlasma; AOthers*Others_Plasma;
  _J8: APlasma -> AFeces; APlasma*Plasma_Feces;
  _J9: APlasma -> ALiver; APlasma*Plasma_Liver;
  _J10: ALiver -> APlasma; ALiver*Liver_Plasma;
  _J11: ALiver -> AMetallothionein; ALiver*Liver_Metallothionein;
  _J12: ALiver -> AFeces; ALiver*Liver_Feces;
  _J13: ARBC -> AMetallothionein; ARBC*RBC_Metallothionein;
  _J14: AMetallothionein -> AKidney; AMetallothionein*Metallothionein_Kidney;
  _J15: AKidney -> APlasma; AKidney*Kidney_Plasma;
  _J16: AKidney -> AUrine; AKidney*Kidney_Urine;
  _J17: AMetallothionein -> AUrine; AMetallothionein*(1 - Metallothionein_Kidney);

  // Unit definitions:
  unit MicroGM = 1e-6 gram;
  unit DAY = 86400 second;
  unit L = litre;
  unit UNITLESS = dimensionless;
  unit KiloGM = 1000 gram;
  unit YR = 3.15576e7 second;
  unit PER_DAY = 1 / (86400 second);
  unit MicroGM_PER_DAY = 1e-6 gram / (86400 second);
end
